*Heading
** Job name: notchedcrack Model name: notchedcrack
** Generated by: Abaqus/CAE 6.13-2
*Preprint, echo=NO, model=NO, history=NO, contact=NO
**
** PARTS
**
*Part, name=Part-1
*Node
      1, -3.72529056e-11, 0.000499999966
      2,           0., 0.00499999989
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*Element, type=CPS3
  1, 133, 116,  15
  2, 177, 134, 149
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*Elset, elset=BULK, generate
   1,  455,    1
** Section: Section-1-BULK
*Solid Section, elset=BULK, material=MAT1
,
*End Part
**
**
** ASSEMBLY
**
*Assembly, name=Assembly
**
*Instance, name=Part-1-1, part=Part-1
*End Instance
**
*Nset, nset=BOTTOMNODES, instance=Part-1-1
  5,  6, 25, 26, 27, 28, 29, 30, 31, 32, 33
*Nset, nset=TOPNODES, instance=Part-1-1
  2,  7, 53, 54, 55, 56, 57, 58, 59, 60, 61
*End Assembly
*Amplitude, name=AMP-1, time=TOTAL TIME
             0.,              0.,             0.1,              1.
**
** MATERIALS
**
*Material, name=ADHESIVE
*Damage Initiation, criterion=QUADS
61.,68.,68.
*Damage Evolution, type=ENERGY, mixed mode behavior=BK, power=1.45
 0.075, 0.547, 0.547
*Density
1500.,
*Elastic, type=TRACTION
 1e+06, 1e+06, 1e+06
*Material, name=MAT1
*Density
1500.,
*Elastic
 1e+10, 0.35
** ----------------------------------------------------------------
**
** STEP: Step-1
**
*Step, name=Step-1, nlgeom=YES
*Dynamic, Explicit
, 0.1
*Bulk Viscosity
0.06, 1.2
**
** BOUNDARY CONDITIONS
**
** Name: BC-1 Type: Displacement/Rotation
*Boundary, amplitude=AMP-1
BOTTOMNODES, 2, 2, -0.001
** Name: BC-2 Type: Displacement/Rotation
*Boundary, amplitude=AMP-1
TOPNODES, 2, 2, 0.001
**
** OUTPUT REQUESTS
**
*Restart, write, number interval=1, time marks=NO
**
** FIELD OUTPUT: F-Output-1
**
*Output, field, number interval=100
*Node Output
A, RF, U, V
**
** FIELD OUTPUT: F-Output-2
**
*Element Output, directions=YES
E, MISES, S
**
** HISTORY OUTPUT: H-Output-1
**
*Output, history, variable=PRESELECT
*End Step
